# Лабораторна робота №7 Виконав студент групи ІС-31 Коваль Богдан
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# Варіант №11
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# Заданий інтеграл (за варіантом) | Заданий функція (за вар.)
f(x) := (x + 1)*sin(x)
integral((x + 1)*sin(x), x = 0.7 .. 1.4) = 1.23354  # Задамо границі інтегрування (за вар.)
a := 0.7
b := 1.4
# Точність для метода
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# Обчислення похибки для метода Сімпсона
ε := 0.0001
# Знайдемо значення інтегралу методом Сімпсона.
#
# Підготовчий етап.
# Для знаходження інтегралу із заданою точність потрібно знайти кількість кроків інтегрування (n) та сам крок (k)
# 1. Знайдемо похідну 4-го порядку.
f_1(x) := d/dx(f(x)) → sin(x) + (x + 1)*cos(x)
f_2(x) := d/dx(f_1(x)) → (-x - 1)*sin(x) + 2*cos(x)
f_3(x) := d/dx(f_2(x)) → -(3*sin(x)) - (x + 1)*cos(x)
f_4(x) := d/dx(f_3(x)) → (x + 1)*sin(x) - 4*cos(x)
# Побудуємо графік похідної 4-го порядку. Щоб визначити найбільше значення
# [plot: f_4(x) vs x]
# Графік в нас зростає, і його максимум досягається в точці x = 1.4.
# 1. Знайдемо значення функції
# 2. З формули 1.9 знайдемо n. Використаємо метод підставновки.
P_f := f_4(1.4) = 1.68521
# Визначемо кількість кроків.
n := 1
10^-4 ≥ (1.4 - 0.7)^5/(180*n^4)*P_f = 0
# Використаємо кількість кроків 4
n := 2
n := 4
10^-4 ≥ (1.4 - 0.7)^5/(180*n^4)*P_f = 1
# Обр. крок
h := (b - a)/n = 0.175  # Отже, min кількість кроків n = 2
# Отримане значення інтегралу з програми. Порівняємо значення з обрахунком у сис. MathCAD. Знайдемо похибку.
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resProgram := 1.23354191804
resMathCAD := integral((x + 1)*sin(x), x = 0.7 .. 1.4) = 1.23354
# Знайдемо похибку
res_ε := |resMathCAD - resProgram| = 7.00137e-7
predicted_ε := (1.4 - 0.7)^5/(180*4^4)*P_f = 6.14656e-6
# Зробимо перевірку:
res_ε < predicted_ε = 1  # Відповідна точність досягнута, то розрахунки виявилися правильними.
# Знайдемо значення інтегралу Гауса
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# З метод. спершу потрібно привезти межі інтегрування до [-1, 1]
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# Використаємо відповідну формулу
# Підст. значення
# Обраховуємо
x_i(z) := (1.4 + 0.7)/2 + z*(1.4 - 0.7)/2
x_i(z) := 1.05 + z*0.35
# Далі підставляємо в функцію і отримаємо оновлену функцію.
f2(z) := 0.35*(2.05 + 0.35*z)*sin(1.05 + 0.35*z)
f2(10) = -1.91694
# Оновлений інтеграл на оновленому проміжку
integral(0.35*(2.05 + 0.35*z)*sin(1.05 + 0.35*z), z = -1 .. 1) = 1.23354
integral(f2(z), z = -1 .. 1) = 1.23354
# Відшукаємо кількість m у формулі Гауса (скористаємося форм. із методички 1.14)
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# Припустимо, що m = 2 (мет.). Підставляємо це значення 2m, слідує нам теж спочатку треба знайти 4-ту похідну, але вже оновленої функції.
m := 2  # Визначимо межі інтегрування
z := -1, -0.95 .. 1
f2_4(z) := d^4/dz^4(f2(z)) → (0.001838265625*z + 0.010766984375)*sin(0.35*z + 1.05) - 0.02100875*cos(0.35*z + 1.05)
# [plot: f2_4(z) vs z]
# Бачимо що функція зростає на всьому проміжку х, тому найбільшого значення набуває в точці -1 (тому що модуль).
P_f2 := f2_4(-1) = -0.0103163
# Використовуючи похибку за формулою 1.14, знайдемо кількість кроків
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m = 2
ε_2 := (m!)^4*(1 + 1)^(2 - 1)/((2*m + 1)*(2*m)!^3)*P_f2 = -4.77608e-6
(10^-4 > ε_2) = 1
# Відповідна точність досягнута. Тому, мінімальна кіл-сть кроків 2
# Тепер знайдемо з таблиці (знаючи кількість кроків) квадратні коефіцієнти Гауса
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t_1 := -0.577350
c_1 := 1
t_2 := -t_1 = 0.57735
c_2 := 1
# Отримані дані з програми
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# Обчислення значень:
res_2MathCAD := c_1*f2(t_1) + c_1*f2(t_2) = 1.23355
res_2Program := 1.23355065164
# Знайдемо похибку
res2_ε := |res_2MathCAD - res_2Program| = 0
# Зробимо перевірку:
ε_2 := (m!)^4*(1 + 1)^(2 - 1)/((2*m + 1)*(2*m)!^3)*P_f2 = -4.77608e-6
res2_ε < ε_2 = 0
# Відповідна точність досягнута, то розрахунки виявилися правильними.
